units metal
atom_style full
dimension 3
boundary p p p
neighbor 1.0 bin
timestep 0.002
neigh_modify every 1 delay 0 check yes
neigh_modify one 5000

read_data data.txt
#replicate 10 10 10
#write_data 1.txt

kspace_style pppm 1e-4
pair_style hybrid/overlay buck/coul/long 10.5 lennard/mdf 2.5 3
pair_coeff	1 1 buck/coul/long 0 0.1 0
pair_coeff	1 2 buck/coul/long 2153.80 0.2908 0.00
pair_coeff	1 3 buck/coul/long 0	 0.1 0
pair_coeff	1 4 buck/coul/long 0 0.1 0
pair_coeff	1 5 buck/coul/long 0	 0.1 0
pair_coeff	2 2 buck/coul/long 4869.99 0.2402 27.22
pair_coeff 2 2 lennard/mdf 27.22 0
pair_coeff	2 3 buck/coul/long 876.86 0.2589 0.00
pair_coeff	2 4 buck/coul/long 14509.63 0.2438 30.83
pair_coeff 2 4 lennard/mdf 30.83 0
pair_coeff	2 5 buck/coul/long 7042.59 0.2317 101.50
pair_coeff 2 5 lennard/mdf 101.5 0
pair_coeff	3 3 buck/coul/long 0	 0.1 0
pair_coeff	3 4 buck/coul/long 0	 0.1 0
pair_coeff	3 5 buck/coul/long 0	 0.1 0
pair_coeff	4 4 buck/coul/long 0	 0.1 0
pair_coeff	4 5 buck/coul/long 0	 0.1 0
pair_coeff	5 5 buck/coul/long 0 0.1 0

#region 1 sphere 48.75 48.75 48.75 41.25
#delete_atoms region 1 compress no
#region 2 sphere 48.75 48.75 146.25 41.25
#delete_atoms region 2 compress no
#region 3 sphere 48.75 146.25 48.75 41.25
#delete_atoms region 3 compress no
#region 4 sphere 146.25 48.75 48.75 41.25
#delete_atoms region 4 compress no
#region 5 sphere 146.25 146.25 48.75 41.25
#delete_atoms region 5 compress no
#region 6 sphere 146.25 48.75 146.25 41.25
#delete_atoms region 6 compress no
#region 7 sphere 48.75 146.25 146.25 41.25
#delete_atoms region 7 compress no
#region 8 sphere 146.25 146.25 146.25 41.25
#delete_atoms region 8 compress no
#reset_atoms id
#write_data 1.txt

group Li type 3
group O type 2
group Zr type 1

#delete_atoms random count 31 no Zr NULL 482793
#delete_atoms random count 62 no O NULL 482793
#reset_atoms id
#write_data 1.txt

min_style cg
minimize 1e-15 1e-15 200000 200000

reset_timestep 0

thermo 1000
thermo_style custom step temp etotal lx ly lz press
velocity all create 600.0 520 rot yes dist gaussian
fix 1 all npt temp 600 600 0.05 iso 1.01325 1.01325 0.25
dump 1 all custom 1000000 npt.lammpstrj id type x y z
run 1000000

unfix 1
undump 1

fix 1 all nvt temp 600 600 0.05
dump 1 all custom 1000000 nvt.lammpstrj id type x y z
run 1000000

write_data 2.txt
